FINISH
/CLEAR, START
/TITLE, Task8_opt
/NOPR
RESUME, task8_base_model, db
/PREP7

SECTYPE, 1, BEAM, I, LONG_1, 5
SECDATA, 160.134, 1600, 432.474, 19.6368, 10, 4.26699
SECTYPE, 2, BEAM, I, LONG_2, 5
SECDATA, 124.466, 1600, 515.434, 14.923, 10, 6.50685
SECTYPE, 3, BEAM, I, LONG_3, 5
SECDATA, 211.009, 1600, 461.208, 14.2479, 10, 4.56968
SECTYPE, 4, BEAM, I, LONG_4, 5
SECDATA, 214.893, 1200, 503.917, 10.8206, 10, 8.75217
SECTYPE, 5, BEAM, I, RIB_1, 5
SECDATA, 165.429, 1200, 351.507, 15.8499, 10, 9.05094
SECTYPE, 6, BEAM, I, RIB_2, 5
SECDATA, 168.818, 1200, 393.196, 16.3564, 10, 7.39451
SECTYPE, 7, BEAM, I, RIB_3, 5
SECDATA, 124.186, 1200, 484.276, 19.4699, 10, 9.43779
SECTYPE, 8, BEAM, I, RIB_4, 5
SECDATA, 138.654, 1200, 435.889, 15.8572, 10, 6.10429
SECTYPE, 9, BEAM, I, RIB_5, 5
SECDATA, 180.265, 1200, 295.008, 16.2873, 10, 5.36504

FINISH
FINISH
/SOLU
ANTYPE, STATIC
OUTRES, ALL, LAST
OUTRES, MISC, LAST
SOLVE
FINISH

/POST1
SET, LAST
/ESHAPE, 1

*GET, sx_max, SECR, ALL, S, X, MAX
*GET, sx_min, SECR, ALL, S, X, MIN
*GET, sxy_max, SECR, ALL, S, XY, MAX
*GET, sxy_min, SECR, ALL, S, XY, MIN
*GET, sxz_max, SECR, ALL, S, XZ, MAX
*GET, sxz_min, SECR, ALL, S, XZ, MIN

max_bend = ABS(sx_max)
*IF,ABS(sx_min),GT,max_bend,THEN
	max_bend = ABS(sx_min)
*ENDIF

max_shear = ABS(sxy_max)
*IF,ABS(sxy_min),GT,max_shear,THEN
	max_shear = ABS(sxy_min)
*ENDIF
*IF,ABS(sxz_max),GT,max_shear,THEN
	max_shear = ABS(sxz_max)
*ENDIF
*IF,ABS(sxz_min),GT,max_shear,THEN
	max_shear = ABS(sxz_min)
*ENDIF

*STATUS,max_bend
*STATUS,max_shear

*CFOPEN, eval_t8_tp60fe652a_c765_4268_8556_031a8a2bbdde_results, txt
*VWRITE, sx_max
(F20.6)
*VWRITE, sx_min
(F20.6)
*VWRITE, sxy_max
(F20.6)
*VWRITE, sxy_min
(F20.6)
*VWRITE, sxz_max
(F20.6)
*VWRITE, sxz_min
(F20.6)

! Total structural mass from FEA model
ALLSEL, ALL
*GET, total_mass, ELEM, 0, MTOT, Z
*VWRITE, total_mass
(E20.10)
*CFCLOS
FINISH
