FINISH
/CLEAR, START
/TITLE, Task8_base
/NOPR

/PREP7
ET, 1, BEAM188
KEYOPT, 1, 4, 2

MP, EX, 1, 2.06e5
MP, PRXY, 1, 0.3
MP, DENS, 1, 7.85e-9

SECTYPE, 1, BEAM, I, LONG_1, 5
SECDATA, 240, 2666.67, 529, 17, 12, 10
SECTYPE, 2, BEAM, I, LONG_2, 5
SECDATA, 240, 2666.67, 529, 17, 12, 10
SECTYPE, 3, BEAM, I, LONG_3, 5
SECDATA, 240, 2666.67, 529, 17, 12, 10
SECTYPE, 4, BEAM, I, LONG_4, 5
SECDATA, 240, 2250, 529, 17, 12, 10
SECTYPE, 5, BEAM, I, RIB_1, 5
SECDATA, 240, 1600, 254, 17, 12, 7
SECTYPE, 6, BEAM, I, RIB_2, 5
SECDATA, 240, 1600, 254, 17, 12, 7
SECTYPE, 7, BEAM, I, RIB_3, 5
SECDATA, 240, 1600, 254, 17, 12, 7
SECTYPE, 8, BEAM, I, RIB_4, 5
SECDATA, 240, 1600, 254, 17, 12, 7
SECTYPE, 9, BEAM, I, RIB_5, 5
SECDATA, 240, 1600, 254, 17, 12, 7

K, 1, -1600, 0, 0
K, 2, 0, 0, 0
K, 3, 1600, 0, 0
K, 4, 3200, 0, 0
K, 5, 4800, 0, 0
K, 6, 6400, 0, 0
K, 7, 8000, 0, 0
K, 8, 9600, 0, 0
K, 9, 11200, 0, 0
K, 10, 12800, 0, 0
K, 11, 14400, 0, 0
K, 12, -1600, 3000, 0
K, 13, 0, 3000, 0
K, 14, 1600, 3000, 0
K, 15, 3200, 3000, 0
K, 16, 4800, 3000, 0
K, 17, 6400, 3000, 0
K, 18, 8000, 3000, 0
K, 19, 9600, 3000, 0
K, 20, 11200, 3000, 0
K, 21, 12800, 3000, 0
K, 22, 14400, 3000, 0
K, 23, -1600, 6000, 0
K, 24, 0, 6000, 0
K, 25, 1600, 6000, 0
K, 26, 3200, 6000, 0
K, 27, 4800, 6000, 0
K, 28, 6400, 6000, 0
K, 29, 8000, 6000, 0
K, 30, 9600, 6000, 0
K, 31, 11200, 6000, 0
K, 32, 12800, 6000, 0
K, 33, 14400, 6000, 0
K, 34, -1600, 9000, 0
K, 35, 0, 9000, 0
K, 36, 1600, 9000, 0
K, 37, 3200, 9000, 0
K, 38, 4800, 9000, 0
K, 39, 6400, 9000, 0
K, 40, 8000, 9000, 0
K, 41, 9600, 9000, 0
K, 42, 11200, 9000, 0
K, 43, 12800, 9000, 0
K, 44, 14400, 9000, 0
K, 45, -1600, 12000, 0
K, 46, 0, 12000, 0
K, 47, 1600, 12000, 0
K, 48, 3200, 12000, 0
K, 49, 4800, 12000, 0
K, 50, 6400, 12000, 0
K, 51, 8000, 12000, 0
K, 52, 9600, 12000, 0
K, 53, 11200, 12000, 0
K, 54, 12800, 12000, 0
K, 55, 14400, 12000, 0
K, 56, -1600, 15000, 0
K, 57, 0, 15000, 0
K, 58, 1600, 15000, 0
K, 59, 3200, 15000, 0
K, 60, 4800, 15000, 0
K, 61, 6400, 15000, 0
K, 62, 8000, 15000, 0
K, 63, 9600, 15000, 0
K, 64, 11200, 15000, 0
K, 65, 12800, 15000, 0
K, 66, 14400, 15000, 0
K, 67, -1600, 18000, 0
K, 68, 0, 18000, 0
K, 69, 1600, 18000, 0
K, 70, 3200, 18000, 0
K, 71, 4800, 18000, 0
K, 72, 6400, 18000, 0
K, 73, 8000, 18000, 0
K, 74, 9600, 18000, 0
K, 75, 11200, 18000, 0
K, 76, 12800, 18000, 0
K, 77, 14400, 18000, 0
K, 78, 0, -1500, 0
K, 79, 0, 19500, 0
K, 80, 1600, -1500, 0
K, 81, 1600, 19500, 0
K, 82, 3200, -1500, 0
K, 83, 3200, 19500, 0
K, 84, 4800, -1500, 0
K, 85, 4800, 19500, 0
K, 86, 6400, -1500, 0
K, 87, 6400, 19500, 0
K, 88, 8000, -1500, 0
K, 89, 8000, 19500, 0
K, 90, 9600, -1500, 0
K, 91, 9600, 19500, 0
K, 92, 11200, -1500, 0
K, 93, 11200, 19500, 0
K, 94, 12800, -1500, 0
K, 95, 12800, 19500, 0

L, 1, 2
L, 2, 3
L, 3, 4
L, 4, 5
L, 5, 6
L, 6, 7
L, 7, 8
L, 8, 9
L, 9, 10
L, 10, 11
L, 12, 13
L, 13, 14
L, 14, 15
L, 15, 16
L, 16, 17
L, 17, 18
L, 18, 19
L, 19, 20
L, 20, 21
L, 21, 22
L, 23, 24
L, 24, 25
L, 25, 26
L, 26, 27
L, 27, 28
L, 28, 29
L, 29, 30
L, 30, 31
L, 31, 32
L, 32, 33
L, 34, 35
L, 35, 36
L, 36, 37
L, 37, 38
L, 38, 39
L, 39, 40
L, 40, 41
L, 41, 42
L, 42, 43
L, 43, 44
L, 45, 46
L, 46, 47
L, 47, 48
L, 48, 49
L, 49, 50
L, 50, 51
L, 51, 52
L, 52, 53
L, 53, 54
L, 54, 55
L, 56, 57
L, 57, 58
L, 58, 59
L, 59, 60
L, 60, 61
L, 61, 62
L, 62, 63
L, 63, 64
L, 64, 65
L, 65, 66
L, 67, 68
L, 68, 69
L, 69, 70
L, 70, 71
L, 71, 72
L, 72, 73
L, 73, 74
L, 74, 75
L, 75, 76
L, 76, 77
L, 78, 2
L, 2, 13
L, 13, 24
L, 24, 35
L, 35, 46
L, 46, 57
L, 57, 68
L, 68, 79
L, 80, 3
L, 3, 14
L, 14, 25
L, 25, 36
L, 36, 47
L, 47, 58
L, 58, 69
L, 69, 81
L, 82, 4
L, 4, 15
L, 15, 26
L, 26, 37
L, 37, 48
L, 48, 59
L, 59, 70
L, 70, 83
L, 84, 5
L, 5, 16
L, 16, 27
L, 27, 38
L, 38, 49
L, 49, 60
L, 60, 71
L, 71, 85
L, 86, 6
L, 6, 17
L, 17, 28
L, 28, 39
L, 39, 50
L, 50, 61
L, 61, 72
L, 72, 87
L, 88, 7
L, 7, 18
L, 18, 29
L, 29, 40
L, 40, 51
L, 51, 62
L, 62, 73
L, 73, 89
L, 90, 8
L, 8, 19
L, 19, 30
L, 30, 41
L, 41, 52
L, 52, 63
L, 63, 74
L, 74, 91
L, 92, 9
L, 9, 20
L, 20, 31
L, 31, 42
L, 42, 53
L, 53, 64
L, 64, 75
L, 75, 93
L, 94, 10
L, 10, 21
L, 21, 32
L, 32, 43
L, 43, 54
L, 54, 65
L, 65, 76
L, 76, 95

K, 1001, -1600, 0, -1000
K, 1002, 14400, 0, -1000
K, 1003, -1600, 3000, -1000
K, 1004, 14400, 3000, -1000
K, 1005, -1600, 6000, -1000
K, 1006, 14400, 6000, -1000
K, 1007, -1600, 9000, -1000
K, 1008, 14400, 9000, -1000
K, 1009, -1600, 12000, -1000
K, 1010, 14400, 12000, -1000
K, 1011, -1600, 15000, -1000
K, 1012, 14400, 15000, -1000
K, 1013, -1600, 18000, -1000
K, 1014, 14400, 18000, -1000
K, 2001, 0, -1500, -1000
K, 2002, 0, 19500, -1000
K, 2003, 1600, -1500, -1000
K, 2004, 1600, 19500, -1000
K, 2005, 3200, -1500, -1000
K, 2006, 3200, 19500, -1000
K, 2007, 4800, -1500, -1000
K, 2008, 4800, 19500, -1000
K, 2009, 6400, -1500, -1000
K, 2010, 6400, 19500, -1000
K, 2011, 8000, -1500, -1000
K, 2012, 8000, 19500, -1000
K, 2013, 9600, -1500, -1000
K, 2014, 9600, 19500, -1000
K, 2015, 11200, -1500, -1000
K, 2016, 11200, 19500, -1000
K, 2017, 12800, -1500, -1000
K, 2018, 12800, 19500, -1000

LSEL, S, LINE, , 1, 10
LATT, 1, , 1, , 1001, , 4
LESIZE, ALL, , , 20
LSEL, S, LINE, , 11, 20
LATT, 1, , 1, , 1003, , 3
LESIZE, ALL, , , 20
LSEL, S, LINE, , 21, 30
LATT, 1, , 1, , 1005, , 2
LESIZE, ALL, , , 20
LSEL, S, LINE, , 31, 40
LATT, 1, , 1, , 1007, , 1
LESIZE, ALL, , , 20
LSEL, S, LINE, , 41, 50
LATT, 1, , 1, , 1009, , 2
LESIZE, ALL, , , 20
LSEL, S, LINE, , 51, 60
LATT, 1, , 1, , 1011, , 3
LESIZE, ALL, , , 20
LSEL, S, LINE, , 61, 70
LATT, 1, , 1, , 1013, , 4
LESIZE, ALL, , , 20
LSEL, S, LINE, , 71, 78
LATT, 1, , 1, , 2001, , 9
LESIZE, ALL, , , 5
LSEL, S, LINE, , 79, 86
LATT, 1, , 1, , 2003, , 8
LESIZE, ALL, , , 5
LSEL, S, LINE, , 87, 94
LATT, 1, , 1, , 2005, , 7
LESIZE, ALL, , , 5
LSEL, S, LINE, , 95, 102
LATT, 1, , 1, , 2007, , 6
LESIZE, ALL, , , 5
LSEL, S, LINE, , 103, 110
LATT, 1, , 1, , 2009, , 5
LESIZE, ALL, , , 5
LSEL, S, LINE, , 111, 118
LATT, 1, , 1, , 2011, , 6
LESIZE, ALL, , , 5
LSEL, S, LINE, , 119, 126
LATT, 1, , 1, , 2013, , 7
LESIZE, ALL, , , 5
LSEL, S, LINE, , 127, 134
LATT, 1, , 1, , 2015, , 8
LESIZE, ALL, , , 5
LSEL, S, LINE, , 135, 142
LATT, 1, , 1, , 2017, , 9
LESIZE, ALL, , , 5

ALLSEL, ALL
LMESH, ALL
ALLSEL, ALL

NSEL, S, LOC, X, -1600
D, ALL, UX, 0
D, ALL, UY, 0
D, ALL, UZ, 0
D, ALL, ROTX, 0
D, ALL, ROTY, 0
D, ALL, ROTZ, 0
ALLSEL, ALL
NSEL, S, LOC, X, 14400
D, ALL, UX, 0
D, ALL, UY, 0
D, ALL, UZ, 0
D, ALL, ROTX, 0
D, ALL, ROTY, 0
D, ALL, ROTZ, 0
ALLSEL, ALL
NSEL, S, LOC, Y, -1500
D, ALL, UX, 0
D, ALL, UY, 0
D, ALL, UZ, 0
ALLSEL, ALL
NSEL, S, LOC, Y, 19500
D, ALL, UX, 0
D, ALL, UY, 0
D, ALL, UZ, 0
ALLSEL, ALL

ESEL, S, SEC, , 5, 9
SFBEAM, ALL, 1, PRES, 15, 15
ALLSEL, ALL

SAVE, task8_base_model, db
FINISH
