FINISH
/CLEAR, START
/TITLE, Task9_opt
/NOPR

/PREP7
ET, 1, BEAM188
KEYOPT, 1, 4, 2

MP, EX, 1, 2.06e5
MP, PRXY, 1, 0.3
MP, DENS, 1, 7.85e-9

SECTYPE, 1, BEAM, I, LONG_1, 5
SECDATA, 156.901, 133.333, 419.976, 10.4337, 12, 10.4102
SECTYPE, 2, BEAM, I, LONG_2, 5
SECDATA, 160.464, 133.333, 402.545, 12.2569, 12, 9.86231
SECTYPE, 3, BEAM, I, LONG_3, 5
SECDATA, 166.174, 133.333, 411.615, 9.78068, 12, 8.61479
SECTYPE, 4, BEAM, I, LONG_4, 5
SECDATA, 152.37, 133.333, 423.669, 9.91205, 12, 7
SECTYPE, 5, BEAM, I, RIB_1, 5
SECDATA, 55.8293, 400, 205.172, 9.69426, 12, 10.417
SECTYPE, 6, BEAM, I, RIB_2, 5
SECDATA, 63.37, 400, 251.913, 9.082, 12, 8.68274
SECTYPE, 7, BEAM, I, RIB_3, 5
SECDATA, 106.035, 400, 225.363, 8.2632, 12, 7.54684
SECTYPE, 8, BEAM, I, RIB_4, 5
SECDATA, 74.2175, 400, 173.751, 7.81187, 12, 8.04629
SECTYPE, 9, BEAM, I, RIB_5, 5
SECDATA, 120, 400, 269.07, 7.12633, 12, 6.27386

K, 1, -400, 0, 0
K, 2, 0, 0, 0
K, 3, 800, 0, 0
K, 4, 1600, 0, 0
K, 5, 2400, 0, 0
K, 6, 3200, 0, 0
K, 7, 4000, 0, 0
K, 8, 4800, 0, 0
K, 9, 5600, 0, 0
K, 10, 6400, 0, 0
K, 11, 6800, 0, 0
K, 12, -400, 2400, 0
K, 13, 0, 2400, 0
K, 14, 800, 2400, 0
K, 15, 1600, 2400, 0
K, 16, 2400, 2400, 0
K, 17, 3200, 2400, 0
K, 18, 4000, 2400, 0
K, 19, 4800, 2400, 0
K, 20, 5600, 2400, 0
K, 21, 6400, 2400, 0
K, 22, 6800, 2400, 0
K, 23, -400, 4800, 0
K, 24, 0, 4800, 0
K, 25, 800, 4800, 0
K, 26, 1600, 4800, 0
K, 27, 2400, 4800, 0
K, 28, 3200, 4800, 0
K, 29, 4000, 4800, 0
K, 30, 4800, 4800, 0
K, 31, 5600, 4800, 0
K, 32, 6400, 4800, 0
K, 33, 6800, 4800, 0
K, 34, -400, 7200, 0
K, 35, 0, 7200, 0
K, 36, 800, 7200, 0
K, 37, 1600, 7200, 0
K, 38, 2400, 7200, 0
K, 39, 3200, 7200, 0
K, 40, 4000, 7200, 0
K, 41, 4800, 7200, 0
K, 42, 5600, 7200, 0
K, 43, 6400, 7200, 0
K, 44, 6800, 7200, 0
K, 45, -400, 9600, 0
K, 46, 0, 9600, 0
K, 47, 800, 9600, 0
K, 48, 1600, 9600, 0
K, 49, 2400, 9600, 0
K, 50, 3200, 9600, 0
K, 51, 4000, 9600, 0
K, 52, 4800, 9600, 0
K, 53, 5600, 9600, 0
K, 54, 6400, 9600, 0
K, 55, 6800, 9600, 0
K, 56, -400, 12000, 0
K, 57, 0, 12000, 0
K, 58, 800, 12000, 0
K, 59, 1600, 12000, 0
K, 60, 2400, 12000, 0
K, 61, 3200, 12000, 0
K, 62, 4000, 12000, 0
K, 63, 4800, 12000, 0
K, 64, 5600, 12000, 0
K, 65, 6400, 12000, 0
K, 66, 6800, 12000, 0
K, 67, -400, 14400, 0
K, 68, 0, 14400, 0
K, 69, 800, 14400, 0
K, 70, 1600, 14400, 0
K, 71, 2400, 14400, 0
K, 72, 3200, 14400, 0
K, 73, 4000, 14400, 0
K, 74, 4800, 14400, 0
K, 75, 5600, 14400, 0
K, 76, 6400, 14400, 0
K, 77, 6800, 14400, 0
K, 78, 0, -1200, 0
K, 79, 0, 15600, 0
K, 80, 800, -1200, 0
K, 81, 800, 15600, 0
K, 82, 1600, -1200, 0
K, 83, 1600, 15600, 0
K, 84, 2400, -1200, 0
K, 85, 2400, 15600, 0
K, 86, 3200, -1200, 0
K, 87, 3200, 15600, 0
K, 88, 4000, -1200, 0
K, 89, 4000, 15600, 0
K, 90, 4800, -1200, 0
K, 91, 4800, 15600, 0
K, 92, 5600, -1200, 0
K, 93, 5600, 15600, 0
K, 94, 6400, -1200, 0
K, 95, 6400, 15600, 0

L, 1, 2
L, 2, 3
L, 3, 4
L, 4, 5
L, 5, 6
L, 6, 7
L, 7, 8
L, 8, 9
L, 9, 10
L, 10, 11
L, 12, 13
L, 13, 14
L, 14, 15
L, 15, 16
L, 16, 17
L, 17, 18
L, 18, 19
L, 19, 20
L, 20, 21
L, 21, 22
L, 23, 24
L, 24, 25
L, 25, 26
L, 26, 27
L, 27, 28
L, 28, 29
L, 29, 30
L, 30, 31
L, 31, 32
L, 32, 33
L, 34, 35
L, 35, 36
L, 36, 37
L, 37, 38
L, 38, 39
L, 39, 40
L, 40, 41
L, 41, 42
L, 42, 43
L, 43, 44
L, 45, 46
L, 46, 47
L, 47, 48
L, 48, 49
L, 49, 50
L, 50, 51
L, 51, 52
L, 52, 53
L, 53, 54
L, 54, 55
L, 56, 57
L, 57, 58
L, 58, 59
L, 59, 60
L, 60, 61
L, 61, 62
L, 62, 63
L, 63, 64
L, 64, 65
L, 65, 66
L, 67, 68
L, 68, 69
L, 69, 70
L, 70, 71
L, 71, 72
L, 72, 73
L, 73, 74
L, 74, 75
L, 75, 76
L, 76, 77
L, 78, 2
L, 2, 13
L, 13, 24
L, 24, 35
L, 35, 46
L, 46, 57
L, 57, 68
L, 68, 79
L, 80, 3
L, 3, 14
L, 14, 25
L, 25, 36
L, 36, 47
L, 47, 58
L, 58, 69
L, 69, 81
L, 82, 4
L, 4, 15
L, 15, 26
L, 26, 37
L, 37, 48
L, 48, 59
L, 59, 70
L, 70, 83
L, 84, 5
L, 5, 16
L, 16, 27
L, 27, 38
L, 38, 49
L, 49, 60
L, 60, 71
L, 71, 85
L, 86, 6
L, 6, 17
L, 17, 28
L, 28, 39
L, 39, 50
L, 50, 61
L, 61, 72
L, 72, 87
L, 88, 7
L, 7, 18
L, 18, 29
L, 29, 40
L, 40, 51
L, 51, 62
L, 62, 73
L, 73, 89
L, 90, 8
L, 8, 19
L, 19, 30
L, 30, 41
L, 41, 52
L, 52, 63
L, 63, 74
L, 74, 91
L, 92, 9
L, 9, 20
L, 20, 31
L, 31, 42
L, 42, 53
L, 53, 64
L, 64, 75
L, 75, 93
L, 94, 10
L, 10, 21
L, 21, 32
L, 32, 43
L, 43, 54
L, 54, 65
L, 65, 76
L, 76, 95

K, 1001, -400, 0, -1000
K, 1002, 6800, 0, -1000
K, 1003, -400, 2400, -1000
K, 1004, 6800, 2400, -1000
K, 1005, -400, 4800, -1000
K, 1006, 6800, 4800, -1000
K, 1007, -400, 7200, -1000
K, 1008, 6800, 7200, -1000
K, 1009, -400, 9600, -1000
K, 1010, 6800, 9600, -1000
K, 1011, -400, 12000, -1000
K, 1012, 6800, 12000, -1000
K, 1013, -400, 14400, -1000
K, 1014, 6800, 14400, -1000
K, 2001, 0, -1200, -1000
K, 2002, 0, 15600, -1000
K, 2003, 800, -1200, -1000
K, 2004, 800, 15600, -1000
K, 2005, 1600, -1200, -1000
K, 2006, 1600, 15600, -1000
K, 2007, 2400, -1200, -1000
K, 2008, 2400, 15600, -1000
K, 2009, 3200, -1200, -1000
K, 2010, 3200, 15600, -1000
K, 2011, 4000, -1200, -1000
K, 2012, 4000, 15600, -1000
K, 2013, 4800, -1200, -1000
K, 2014, 4800, 15600, -1000
K, 2015, 5600, -1200, -1000
K, 2016, 5600, 15600, -1000
K, 2017, 6400, -1200, -1000
K, 2018, 6400, 15600, -1000

LSEL, S, LINE, , 1, 10
LATT, 1, , 1, , 1001, , 4
LESIZE, ALL, , , 20
LSEL, S, LINE, , 11, 20
LATT, 1, , 1, , 1003, , 3
LESIZE, ALL, , , 20
LSEL, S, LINE, , 21, 30
LATT, 1, , 1, , 1005, , 2
LESIZE, ALL, , , 20
LSEL, S, LINE, , 31, 40
LATT, 1, , 1, , 1007, , 1
LESIZE, ALL, , , 20
LSEL, S, LINE, , 41, 50
LATT, 1, , 1, , 1009, , 2
LESIZE, ALL, , , 20
LSEL, S, LINE, , 51, 60
LATT, 1, , 1, , 1011, , 3
LESIZE, ALL, , , 20
LSEL, S, LINE, , 61, 70
LATT, 1, , 1, , 1013, , 4
LESIZE, ALL, , , 20
LSEL, S, LINE, , 71, 78
LATT, 1, , 1, , 2001, , 9
LESIZE, ALL, , , 5
LSEL, S, LINE, , 79, 86
LATT, 1, , 1, , 2003, , 8
LESIZE, ALL, , , 5
LSEL, S, LINE, , 87, 94
LATT, 1, , 1, , 2005, , 7
LESIZE, ALL, , , 5
LSEL, S, LINE, , 95, 102
LATT, 1, , 1, , 2007, , 6
LESIZE, ALL, , , 5
LSEL, S, LINE, , 103, 110
LATT, 1, , 1, , 2009, , 5
LESIZE, ALL, , , 5
LSEL, S, LINE, , 111, 118
LATT, 1, , 1, , 2011, , 6
LESIZE, ALL, , , 5
LSEL, S, LINE, , 119, 126
LATT, 1, , 1, , 2013, , 7
LESIZE, ALL, , , 5
LSEL, S, LINE, , 127, 134
LATT, 1, , 1, , 2015, , 8
LESIZE, ALL, , , 5
LSEL, S, LINE, , 135, 142
LATT, 1, , 1, , 2017, , 9
LESIZE, ALL, , , 5

ALLSEL, ALL
LMESH, ALL
ALLSEL, ALL

NSEL, S, LOC, X, -400
D, ALL, UX, 0
D, ALL, UY, 0
D, ALL, UZ, 0
D, ALL, ROTX, 0
D, ALL, ROTY, 0
D, ALL, ROTZ, 0
ALLSEL, ALL
NSEL, S, LOC, X, 6800
D, ALL, UX, 0
D, ALL, UY, 0
D, ALL, UZ, 0
D, ALL, ROTX, 0
D, ALL, ROTY, 0
D, ALL, ROTZ, 0
ALLSEL, ALL
NSEL, S, LOC, Y, -1200
D, ALL, UX, 0
D, ALL, UY, 0
D, ALL, UZ, 0
ALLSEL, ALL
NSEL, S, LOC, Y, 15600
D, ALL, UX, 0
D, ALL, UY, 0
D, ALL, UZ, 0
ALLSEL, ALL

ESEL, S, SEC, , 5, 9
SFBEAM, ALL, 1, PRES, 25, 25
ALLSEL, ALL

FINISH
/SOLU
ANTYPE, STATIC
OUTRES, ALL, LAST
OUTRES, MISC, LAST
SOLVE
FINISH

/POST1
SET, LAST
/ESHAPE, 1

*GET, sx_max, SECR, ALL, S, X, MAX
*GET, sx_min, SECR, ALL, S, X, MIN
*GET, sxy_max, SECR, ALL, S, XY, MAX
*GET, sxy_min, SECR, ALL, S, XY, MIN
*GET, sxz_max, SECR, ALL, S, XZ, MAX
*GET, sxz_min, SECR, ALL, S, XZ, MIN

*CFOPEN, eval_t9_tped41848e_25cf_4379_bb26_ceb375cdb2bb_results, txt
*VWRITE, sx_max
(F20.6)
*VWRITE, sx_min
(F20.6)
*VWRITE, sxy_max
(F20.6)
*VWRITE, sxy_min
(F20.6)
*VWRITE, sxz_max
(F20.6)
*VWRITE, sxz_min
(F20.6)

! Total structural mass from FEA model
ALLSEL, ALL
*GET, total_mass, ELEM, 0, MTOT, Z
*VWRITE, total_mass
(E20.10)
*CFCLOS
FINISH
